# -*- coding: utf-8 -*-
'''
Step 7:
在这一步中，实现了
1.重建更细致的肠道模型
2.超粘性弹性体
3.加压
4.加入机器人模型
'''
import os
import sys
import Sofa
# from stlib3.physics.collision import CollisionMesh
import stlib3
from stlib3.scene import Scene
from fixingbox import FixingBox


def Intestine_cuda(name="Intestine", rotation=None, translation=None, color=None):
    # 为了建立肠道模型，我们需要 To simulate an intestine object, we need:
    # 1.变形定律（暂使用线性弹性体）a deformation law (here linear elasticity)
    # 2.求解方法（使用FRM）a solving method (here FEM)
    # 3.当我们使用FEM时，我们需要空间离散化（这里是四面体） as we are using FEM we need a space discretization (here tetrahedron)

    # 参数处理
    if color is None:
        color = [1.0, 1., 01.0, 1.0]
    if translation is None:
        translation = [0, 0, 0]
    if rotation is None:
        rotation = [90.0, 0.0, 0.0]

    self = Sofa.Core.Node(name)
    self.addObject('EulerImplicitSolver')
    self.addObject('CGLinearSolver', iterations='100', tolerance='1e-5', threshold='1e-5')
    mechanicalmodel = self.addChild("MechanicalModel")
    mechanicalmodel.addObject('MeshGmshLoader',
                              name='loader',
                              rotation=rotation,
                              translation=translation,
                              filename='data/Intestine/IntestineV1.msh')
    mechanicalmodel.addObject('TetrahedronSetTopologyContainer',
                              src='@loader',
                              name='container')
    mechanicalmodel.addObject('MechanicalObject',
                              name='dofs',
                              position=mechanicalmodel.loader.position.getLinkPath(),
                              showObject=True,
                              showObjectScale=5.0)
    mechanicalmodel.addObject('UniformMass',
                              name="mass",
                              totalMass=0.5)
    # 有限元组件FEM ForceField components
    mechanicalmodel.addObject('TetrahedronFEMForceField',
                              template='Vec3d',
                              name="linearElasticBehavior",
                              youngModulus=500,
                              poissonRatio=0.4)
    mechanicalmodel.addObject("MeshSpringForceField",name="Springs",stiffness=10,damping=1 )

    # Visual model 视觉模型用stl会好看些
    visualmodel = Sofa.Core.Node("VisualModel")
    # Specific loader for the visual model
    visualmodel.addObject('MeshSTLLoader',
                          name='loader',
                          filename='data/Intestine/IntestineV1.stl',
                          rotation=rotation,
                          translation=translation,
                          )
    visualmodel.addObject('OglModel',
                          src=visualmodel.loader.getLinkPath(),
                          name='renderer',
                          color=[1.0, 1.0, 1.0, 0.5])
    self.addChild(visualmodel)

    visualmodel.addObject('BarycentricMapping',
                          input=mechanicalmodel.dofs.getLinkPath(),
                          output=visualmodel.renderer.getLinkPath())

    # 碰撞模型
    # Collision Object for the Cube
    # self.addCollision = CollisionMesh(mechanicalmodel,
    #                                   surfaceMeshFileName="data/Intestine/IntestineV1.stl", name="CollisionModel",
    #                                   rotation=rotation, translation=translation,
    #                                   # collisionGroup=1
    #                                   )
    # collision model
    collisionmodel = self.addChild("CollisionModel")
    collisionmodel.addObject('MeshSTLLoader', name="loader", filename="data/Intestine/IntestineV1.stl",
                             rotation=rotation, translation=translation
                             )
    collisionmodel.addObject('MeshTopology', src="@loader")
    collisionmodel.addObject('MechanicalObject',src="@loader")

    # 碰撞组为
    collisionmodel.addObject('PointCollisionModel')
    collisionmodel.addObject('LineCollisionModel')
    collisionmodel.addObject('TriangleCollisionModel')
    collisionmodel.addObject('BarycentricMapping',
                             input=mechanicalmodel.dofs.getLinkPath()
                             )
    collisionmodel.addObject("SurfacePressureForceField", pressure=0,
                             # pulseMode="true",
                             # pressureSpeed=0.1
                             )

    return self


def createScene(rootNode):
    scene = Scene(rootNode, gravity=[0.0, 0.0, 0.0],dt=0.0001,
                  plugins=['SofaSparseSolver', 'SofaOpenglVisual'],
                  # iterative=False
                  )
    scene.addMainHeader()
    scene.addObject('DefaultAnimationLoop')
    scene.addObject('DefaultVisualManagerLoop')
    # scene.Settings.mouseButton.stiffness = 1
    scene.addObject('GenericConstraintSolver', tolerance=1e-6, maxIterations=1000,
                    computeConstraintForces=True, multithreading=True)

    # scene.Simulation.addObject('CGLinearSolver', iterations='100', tolerance='1e-5', threshold='1e-5')
    # scene.Simulation.addObject('GenericConstraintCorrection')

    scene.VisualStyle.displayFlags = "showBehavior showCollision"

    scene.Simulation.addChild(Intestine_cuda())
    box1 = FixingBox(scene.Simulation,
                     scene.Simulation.Intestine.MechanicalModel,
                     name="box1",
                     translation=[0.0, 10.0, 0.0],
                     scale=[50., 50., 50.])
    box2 = FixingBox(scene.Simulation,
                     scene.Simulation.Intestine.MechanicalModel,
                     name="box2",
                     translation=[0.0, -110.0, 0.0],
                     scale=[50., 50., 50.])

    box1.BoxROI.drawBoxes = True
    box2.BoxROI.drawBoxes = True
    scene.Simulation.addChild(scene.Simulation.box1)
    scene.Simulation.addChild(scene.Simulation.box2)


if __name__ == '__main__':
    # runSofa.exe路径
    path = "D:/Software_download/sofa_22/SOFA_robosoft2022_python-3.8_Windows/bin/runSofa"
    path1 = "/home/lcj/sofa/build/master/bin/runSofa"
    # 使用Sofa运行该文件
    os.system(path1 + " " + sys.argv[0])
